OpenVSP model (file version 5), 7 components.
Geometry view with OpenVSP parameter names; values to 6 digits, angles in degrees, lengths in the model's unit.
Overall bounding box: X_Min=-7 X_Len=38.9827 Y_Min=-31.9239 Y_Len=63.8478 Z_Min=-5.71748 Z_Len=11.435

Blank "FanAssembly"
  location (X Y Z) 30 0 0, rotation 0 0 0

Propeller "PropGeom", child of "FanAssembly"
  location (X Y Z) 30 0 0, rotation 0 0 0; relative location 0 0 0, rotation 0 0 0
  bounding box size 0.496969 10.018 10.018
  Design: Diameter=10 NumBlade=4 Beta34=20 UseBeta34Flag=1 Feather=0 Rotate=0 Precone=0 ReverseFlag=0 FoldAngle=0 PropMode=0 AF=151.538 CLi=0.538798 Chord=0.177656 Solidity=0.226199 ConstructXoC=0.5 FeatherAxisXoC=0.5 FeatherOffsetXoC=0
  cross sections:
    n  RadiusFrac  shape
    0  0.2         ellipse Ellipse_Height=0.2 Ellipse_Width=0.4
    1  0.4         NACA 16-series Chord=0.83125 IdealCl=0.7 ThickChord=0.144074
    2  1           NACA 16-series Chord=0.65 IdealCl=0.2 ThickChord=0.03
  Chord along r/R (cubic Bezier): 0.2: 0.08, 0.333333: 0.15, 0.466667: 0.2, 0.6: 0.2, 0.716667: 0.2, 0.833333: 0.2, 0.95: 0.2, 0.966667: 0.2, 0.983333: 0.2, 1: 0.13
  Twist along r/R (PCHIP): 0.2: 46.75, 0.75: 20, 1: 13
  Thick along r/R (cubic Bezier): 0.2: 0.5, 0.233333: 0.3, 0.266667: 0.225, 0.3: 0.2, 0.4: 0.125, 0.5: 0.115, 0.6: 0.1, 0.733333: 0.075, 0.866667: 0.055, 1: 0.03
  CLI along r/R (cubic Bezier): 0.2: 0, 0.266667: 0.7, 0.333333: 0.7, 0.4: 0.7, 0.466667: 0.7, 0.533333: 0.7, 0.6: 0.7, 0.733333: 0.7, 0.866667: 0.7, 1: 0.2

BodyOfRevolution "Duct", child of "FanAssembly"
  location (X Y Z) 28.0435 0 0, rotation 0 0 0; relative location -1.95652 0 0, rotation 0 0 0
  bounding box size 3.94362 11.3665 11.3665
  Design: A0=86.5901 Ae=65.1935 Amin=65.1935 AminW=0 Angle=10 Diameter=10.5 Mode=0
  profile: NACA 63-series A=0.5 Chord=4 IdealCl=1.5 ThickChord=0.12

Wing "VerticalStab", child of "FanAssembly"
  location (X Y Z) 22.2951 0 0, rotation 90 0 0; relative location -7.70492 0 0, rotation 90 0 0
  symmetric about XY
  bounding box size 7.42063 0.755842 11.3088
  totals: TotalSpan=10.5556 TotalProjectedSpan=10.5556 TotalChord=5.71032 TotalArea=60.2756 TotalAR=1.84851
  root: chord 4, twist 0, NACA 4-series Camber=0 CamberLoc=0.2 ThickChord=0.1
  sections:
    n  Span     Root_Chord  Tip_Chord  Area     Sweep  Sweep_Location  Dihedral  Twist  Twist_Location  tip airfoil
    1  5.27778  4           7.42063    30.1378  0      0               0         0      0.25            as above

Fuselage "Body"
  location (X Y Z) -7 0 0, rotation 0 0 0
  bounding box size 35 12.3643 11.435
  Design: Length=35
  cross sections:
    n  XLocPercent  YLocPercent  ZLocPercent  shape
    0  0            0            0            point
    1  0.680529     0            0            edit curve Width=10 Height=10 AbsoluteFlag=0 SymType=1 cubic Bezier points (X Y): 0.585616 -0.0842466, 0.619868 -0.358257, 0.276142 -0.5, 0 -0.5, -0.276142 -0.5, -0.619868 -0.358257, -0.585616 -0.0842466, -0.54863 0.211644, -0.276142 0.5, 0 0.5, 0.276142 0.5, 0.54863 0.211644, 0.585616 -0.0842466
    2  0.838631     0            0            circle Circle_Diameter=8.01527
    3  1            0            0            point

Wing "MainWing"
  location (X Y Z) 18.8525 0 -1.55738, rotation 0 0 0
  symmetric about XZ
  bounding box size 7.5 63.8478 2.36848
  totals: TotalSpan=64 TotalProjectedSpan=63.8478 TotalChord=6.875 TotalArea=430 TotalAR=9.48033
  root: chord 7.5, twist 0, NACA 4-series Camber=0 CamberLoc=0.2 ThickChord=0.1
  sections:
    n  Span  Root_Chord  Tip_Chord  Area  Sweep  Sweep_Location  Dihedral  Twist  Twist_Location  tip airfoil
    1  12    7.5         7.5        90    0      0.25            0         0      0.25            as above
    2  20    7.5         5          125   0      0.25            5         0      0.25            as above

Wing "Cannard"
  location (X Y Z) -3.36066 0 1.31148, rotation 0 0 0
  symmetric about XZ
  bounding box size 5 40 0.50029
  totals: TotalSpan=40 TotalProjectedSpan=40 TotalChord=4.19643 TotalArea=167.857 TotalAR=9.53191
  root: chord 5, twist 0, NACA 4-series Camber=0 CamberLoc=0.2 ThickChord=0.1
  sections:
    n  Span  Root_Chord  Tip_Chord  Area     Sweep  Sweep_Location  Dihedral  Twist  Twist_Location  tip airfoil
    1  20    5           3.39286    83.9286  0      0.99            0         0      0.25            as above

VSPAERO settings: Sref=430 bref=64 cref=6.875 Xcg=20 Ycg=0 Zcg=0 AlphaStart=1 AlphaEnd=10 AlphaNpts=10 BetaStart=0 BetaEnd=0 BetaNpts=1 MachStart=0 MachEnd=0 MachNpts=1 ReCref=100000 Vinf=30 Rho=1.1
